# OpenSim document version 40600
Model gh_from_app:
  gravity: 0 -9.81 0
  Ground:
    PhysicalOffsetFrame pf: socket_parent=.. translation=(0 0 0) [meters]
        orientation=(-3.141593 -0.5235988 3.141593) [radians]
  BodySet:
    Body humerus: mass=2 [kg] mass_center=(0 -0.15 0) inertia=(0.02 0.002 0.02 0 0 0)
      PhysicalOffsetFrame cf: socket_parent=.. translation=(0 0 0) orientation=(-3.141593 -0.5235988 3.141593)
      WrapSphere head: translation=(0 0 0) quadrant=all radius=0.02286
  JointSet:
    PinJoint gh: socket_parent_frame=/ground/pf socket_child_frame=/bodyset/humerus/cf
      Coordinate abd
  ForceSet:
    PathSpring graft: resting_length=0.04 [m] stiffness=100 [N/m] dissipation=0 [s/m]
      PathPoint SG: ground (0.02331 0.01256 -0.00611)
      PathPoint GT: humerus (-0.01642715 0.01352468 0.006535181)
      PathWrap: wrap_object=head method=hybrid
    PathActuator ssp: optimal_force=1
      PathPoint o: ground (0.04593666 0.01404828 -0.0372039)
      PathPoint i: humerus (-0.01689904 0.0141502 0.006225637)
      PathWrap: wrap_object=head method=hybrid
    PathActuator isp: optimal_force=1
      PathPoint o: ground (0.06141514 -0.03333322 -0.06271154)
      PathPoint i: humerus (-0.01638664 0.002973086 -0.01232137)
      PathWrap: wrap_object=head method=hybrid
    PathActuator ssc: optimal_force=1
      PathPoint o: ground (0.06205185 -0.03017339 -0.03878161)
      PathPoint i: humerus (0.01094435 -7.588294e-5 0.01616516)
      PathWrap: wrap_object=head method=hybrid
    PathActuator tm: optimal_force=1
      PathPoint o: ground (0.04400411 -0.05631286 -0.05135492)
      PathPoint i: humerus (-0.01560583 -0.01211365 -0.01008508)
      PathWrap: wrap_object=head method=hybrid
    PathActuator delt: optimal_force=1
      PathPoint o: ground (0.03403004 0.01612863 -0.01907359)
      PathPoint i: humerus (-0.02572917 -0.05335642 0.004519214)
      PathWrap: wrap_object=head method=hybrid
